OpenVSP model (file version 5), 4 components.
Geometry view with OpenVSP parameter names; values to 6 digits, angles in degrees, lengths in the model's unit.
Overall bounding box: X_Min=0 X_Len=23.7571 Y_Min=-12.6036 Y_Len=25.2072 Z_Min=-1.73599 Z_Len=8.10019

Fuselage "FuselageGeom"
  location (X Y Z) 0 0 0, rotation 0 0 0
  bounding box size 22.5714 3.28699 3.47198
  Design: Length=22.5714
  cross sections:
    n  XLocPercent  YLocPercent  ZLocPercent  shape
    0  0            0            0            circle Circle_Diameter=0.534351
    1  0.149078     0            0            ellipse Ellipse_Height=3.47198 Ellipse_Width=3.16327
    2  0.375        0            0            as above
    3  0.5          0            0            ellipse Ellipse_Height=3.46269 Ellipse_Width=2.88557
    4  0.75         0            0            ellipse Ellipse_Height=3.30155 Ellipse_Width=2.75129
    5  1            0            0            circle Circle_Diameter=1.25954

Wing "WingGeom"
  location (X Y Z) 2.45902 1.06557 -0.819672, rotation 0 0 0
  symmetric about XZ
  bounding box size 6.0246 25.2072 0.616429
  totals: TotalSpan=22.8086 TotalProjectedSpan=22.8086 TotalChord=3.74016 TotalArea=85.3077 TotalAR=6.0983 MAC=4.21621
  root: chord 5.98425, twist 1.65354, NACA 4-series Camber=0 CamberLoc=0.2 DeltaX=1 Scale=1.00714 ThickChord=0.1
  sections:
    n  Span     Root_Chord  Tip_Chord  Area     Sweep  Sweep_Location  Dihedral  Twist  Twist_Location  tip airfoil
    1  11.4043  5.98425     1.49606    42.6539  30     0               0         0      0.25            NACA 4-series Camber=0 CamberLoc=0.2 DeltaX=-0.0285714 ThickChord=0.1

Wing "WingGeom", child of "WingGeom"
  location (X Y Z) 18.1148 0 6.14754, rotation 0 0 0
  symmetric about XZ
  bounding box size 5.64238 15.7953 0.433322
  totals: TotalSpan=15.7953 TotalProjectedSpan=15.7953 TotalChord=2.70669 TotalArea=42.753 TotalAR=5.83564 MAC=3.0315
  root: chord 4.33071, twist 0, NACA 4-series Camber=0 CamberLoc=0.2 ThickChord=0.1
  sections:
    n  Span     Root_Chord  Tip_Chord  Area     Sweep  Sweep_Location  Dihedral  Twist  Twist_Location  tip airfoil
    1  7.89764  4.33071     1.08268    21.3765  30     0               0         0      0.25            as above

Wing "WingGeom", child of "WingGeom"
  location (X Y Z) 15.6557 0 0, rotation 90 0 0
  symmetric about XZ
  bounding box size 8.08433 0.578113 6.33333
  totals: TotalSpan=12.6667 TotalProjectedSpan=12.6667 TotalChord=4.13294 TotalArea=52.3505 TotalAR=3.06481 MAC=4.35114
  root: chord 5.77778, twist 0, NACA 4-series Camber=0 CamberLoc=0.2 DeltaX=-0.335714 ThickChord=0.1
  sections:
    n  Span     Root_Chord  Tip_Chord  Area     Sweep  Sweep_Location  Dihedral  Twist  Twist_Location  tip airfoil
    1  6.33333  5.77778     2.4881     26.1753  30     0               0         0      0.25            NACA 4-series Camber=0 CamberLoc=0.2 ThickChord=0.1
